** ***************************************************************************
**   Written by : direct_femccv_workflow.py
**   Version    : 0.1.2
**   From Model :
**   Date       : 2020/06/05 11:56:43
** ***************************************************************************
**
*HEADING
abaqus
*NODE, NSET=GLOBAL
1,2.0,0.0,0.0
2,0.0,2.0,0.0
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*ELEMENT, TYPE=C3D8, ELSET=PWM
      1,      1,     39,     96,      8,    951,    350,    407,    319
      2,      8,     96,     97,      9,    319,    407,    408,    320
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*ELEMENT, TYPE=C3D8, ELSET=PHAZ
   7804,   8587,   8625,   8682,   8594,   9859,   9897,   9954,   9866
   7805,   8594,   8682,   8683,   8595,   9866,   9954,   9955,   9867
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*ELEMENT, TYPE=C3D8, ELSET=PPM
   9249,   9541,   9579,   9636,   9548,  11131,  11169,  11226,  11138
   9250,   9548,   9636,   9637,   9549,  11138,  11226,  11227,  11139
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** Femap Group 1 : WM
*ELSET, ELSET=GWM, GENERATE
1,7804,1
** Femap Group 2 : HAZ
*ELSET, ELSET=GHAZ, GENERATE
7804,9249,1
** Femap Group 3 : PM
*ELSET, ELSET=GPM, GENERATE
9249,17051,1
** Femap Group 4 : INT_NODES
*NSET, NSET=GINT_NODES
18763,18764,18765,18766,18767,18768
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*ELSET, ELSET=OUT_COUNT, GENERATE
1,17051,1
*ORIENTATION, NAME=S0, DEFINITION=COORDINATES, SYSTEM=RECTANGULAR
        1.,        0.,        0.,        0.,        1.,        0.
** Femap Property 4 : WM
*SOLID SECTION, ELSET=PWM, MATERIAL=WM, ORIENTATION=S0
** Femap Property 5 : HAZ
*SOLID SECTION, ELSET=PHAZ, MATERIAL=HAZ, ORIENTATION=S0
** Femap Property 6 : PM
*SOLID SECTION, ELSET=PPM, MATERIAL=PM, ORIENTATION=S0
** Femap Material 1 : WM
*MATERIAL, NAME=WM
   156695,       0.274,        0.
** Femap Material 2 : HAZ
*MATERIAL, NAME=HAZ
   151703,       0.274,        0.
** Femap Material 3 : PM
*MATERIAL, NAME=PM
   156695,       0.274,        0.
** Load Step 1 -------------------------------------------------------
*STEP, INC=100
force
*STATIC

*NODE PRINT, FREQUENCY=1
    U,
*FILE FORMAT, ASCII
*NODE FILE, FREQUENCY=1
    U,
*NODE FILE, FREQUENCY=1
CF,
*NODE FILE, FREQUENCY=1
RF,
*EL PRINT, ELSET=OUT_CONT,FREQUENCY=1, POSITION=CENTROIDAL
    S,
SINV,
*EL PRINT, ELSET=OUT_CONT,FREQUENCY=1,  POSITION=NODES
    S,
SINV,
*EL FILE, ELSET=OUT_CONT,FREQUENCY=1, POSITION=CENTROIDAL
    S,
SINV,
*EL FILE, ELSET=OUT_CONT,FREQUENCY=1,   POSITION=NODES
    S,
SINV,
*EL PRINT, ELSET=OUT_CONT,FREQUENCY=1, POSITION=CENTROIDAL
*EL PRINT, ELSET=OUT_CONT,FREQUENCY=1,  POSITION=NODES
*EL FILE, ELSET=OUT_CONT,FREQUENCY=1, POSITION=CENTROIDAL
*EL FILE, ELSET=OUT_CONT,FREQUENCY=1,   POSITION=NODES
*BOUNDARY, OP=NEW
   1,    2
   1,    3
   2,    1
   2,    3
   3,    1
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18857,    1
*DLOAD, OP=NEW
16763,        P2,          -120.
16832,        P2,          -120.
16897,        P2,          -120.
16973,        P2,          -120.
16776,        P2,          -120.
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17028,        P2,          -120.
*END STEP
